// COMSOL Multiphysics 5.6.0.401 model "pcal_mirror_deformation_3d.mph"
// Outline of the model tree

Parameters
  r = 75[mm]  // ETM radius
  t = 80 [mm]  // ETM thickness
  w1 = 0.5 [mm]  // Pcal beam radius
  F = 1 [N]  // Radiation force
  p = 2*F/(pi*w1^2)  // Radiation pressure

Coordinate systems
  sys1: Boundary "Boundary System 1"

Geometry
  geom1 "Geometry 1" (3D, length unit m)
    cyl1: Cylinder | ax2 = {0.0, 0.0}; r = r; h = t
    cyl2: Cylinder | pos = {0, 0, 40 [mm]}; r = 10 [mm]; h = 40 [mm]
    fin: Finalize "Form Union"

Materials
  mat2: Common "Silicon" on all domains
    def "Basic"
      relpermeability = 1
      electricconductivity = 1e-12[S/m]
      thermalexpansioncoefficient = 2.6e-6[1/K]
      heatcapacity = 700[J/(kg*K)]
      relpermittivity = 11.7
      density = 2329[kg/m^3]
      thermalconductivity = 130[W/(m*K)]
    Enu "Young's modulus and Poisson's ratio"
      youngsmodulus = 130e9[Pa]
      poissonsratio = 0.28
    RefractiveIndex
      n = 3.48
      ki = 0

Physics
  solid: SolidMechanics on all domains
    dependent variable u = {u, v, w}
    lemm1: LinearElasticModel "Linear Elastic Material 1" (default)
    free1: Free (default)
    init1: init "Initial Values 1" (default)
    bndl1: BoundaryLoad on boundaries 4, 8
      LoadType = ForceArea
      Ftot = {0, 0, -2*P/c*exp(-2*(x+y)^2/wa^2)}
      FollowerPressure = 0
      FperArea = {0, 0, -p*exp(-2*(x^2+y^2)/w1^2)}
      coordinateSystem = GlobalSystem
    fix1: Fixed "Fixed Constraint 1" on boundaries 3, 7

Mesh
  mesh1 "Mesh 1"
    size1: Size on domains 2 | hmax = 0.003; hmin = 3.0E-5; hauto = 1
    ftet1: FreeTet "Free Tetrahedral 1" on remaining entities

Studies
  std1 "Study 1"
    stat: Stationary

Solver configurations
  sol1 "Solution 1" (study std1)
    v1: Variables "Dependent Variables 1"
    s1: Stationary "Stationary Solver 1"
      fc1: FullyCoupled | linsolver = d1
      d1: Direct "Suggested Direct Solver (solid)" | linsolver = pardiso; pivotperturb = 1.0E-9

Datasets
  dset1: Solution | solution = sol1
  cpl1: CutPlane | data = dset1; planetype = general; genpoints = {{0, 0, 0}, {0, 0.0, 0.1}, {0, 0.1, 0}}
  surf1: Surface on boundaries 4, 8 | data = dset1; param = xy
  cln1: CutLine2D | data = surf1; method = pointdir; genpoints = {{0, 0}, {0.1, 0}}; pdpoint = {-0.1, 0}

Plots
  pg1: PlotGroup3D "Stress (solid)" | data = dset1
    surf1: Surface | expr = solid.mises
      def: Deform "Deformation" | expr = {u, v, w}; descr = Displacement field
  pg2: PlotGroup3D "Boundary Loads (solid)" | data = dset1
    arws1: ArrowSurface "Boundary Load 1" | expr = {solid.bndl1.F_Ax, solid.bndl1.F_Ay, solid.bndl1.F_Az}
      col: Color "Color Expression" | expr = solid.bndl1.F_A_Mag
      def: Deform "Deformation" | expr = {u, v, w}; descr = Displacement field
    surf1: Surface "Gray Surfaces" | expr = 1
      def: Deform "Deformation" | expr = {u, v, w}; descr = Displacement field
      sel1: Selection on boundaries 1-4, 7-9, 12
      tran1: Transparency | transparency = 0.8
  pg3: PlotGroup2D "2D Plot Group 3" | data = cln1; xlabel = Radius [m]; ylabel = Displacement [m]
    line1: Line | data = cln1; expr = solid.disp
  pg4: PlotGroup1D "1D Plot Group 4" | data = cln1; xlabel = Radius [m]; ylabel = Displacement [m]
    lngr1: LineGraph | expr = solid.disp/F; unit = m/N

Exports
  plot1: Plot
    filename = C:\Users\larsk\OneDrive\Documents\AA Lars 2025\1. Graduation Project\COMSOL\exports\def_3d_etpf.dat