// COMSOL Multiphysics 5.6.0.401 model "window_conduction_surround_cooled.mph"
// Outline of the model tree

Geometry
  geom1 "Geometry 1" (2D axisymmetric, length unit m)
    r1: Rectangle | size = {50 [mm], 2[mm]}
    r2: Rectangle | pos = {50[mm], 0}; size = {5 [mm], 2[mm]}
    fin: Finalize "Form Union"

Materials
  mat1: Common "Silica glass" on domains 1, 2
    def "Basic"
      relpermeability = 1
      electricconductivity = 1e-14[S/m]
      thermalexpansioncoefficient = 0.55e-6[1/K]
      heatcapacity = 703[J/(kg*K)]
      relpermittivity = 3.75
      density = 2203[kg/m^3]
      thermalconductivity = 0.9[W/(m*K)]
    Enu "Young's modulus and Poisson's ratio"
      youngsmodulus = 73.1e9[Pa]
      poissonsratio = 0.17
    RefractiveIndex
      n = 1.45
      ki = 0
  mat2: Common "Al - Aluminum" on no domains
    def "Basic"
      electricconductivity = 35.5e6[S/m]
      thermalexpansioncoefficient = 23.1e-6[1/K]
      heatcapacity = 904[J/(kg*K)]
      density = 2700[kg/m^3]
      thermalconductivity = 237[W/(m*K)]
    Enu "Young's modulus and Poisson's ratio"
      youngsmodulus = 70.0e9[Pa]
      poissonsratio = 0.35

Physics
  ht: HeatTransfer "Heat Transfer in Solids" on all domains
    dependent variable T
    solid1: SolidHeatTransferModel "Solid 1" (default) | k_mat = userdef; k = 0.9
    init1: init "Initial Values 1" (default) | Tinit = 80[K]
    axi1: AxialSymmetry (default)
    ins1: ThermalInsulation (default)
    sar1: SurfaceToAmbientRadiation on boundaries 2, 3 | epsilon_rad_mat = userdef; epsilon_rad = 1; Tamb = 80
    hf1: HeatFluxBoundary "Heat Flux 1" on boundaries 3 | HeatFluxType = HeatRate; P0 = 2.16; materialType = solid
    hf2: HeatFluxBoundary "Heat Flux 2" on boundaries 5-7
      HeatFluxType = ConvectiveHeatFlux
      P0 = 0
      h = 100
      Text = 80 [K]
      materialType = solid
    temp1: TemperatureBoundary "Temperature 1" (disabled) on no boundaries | T0 = 80[K]
  solid: SolidMechanics on all domains
    dependent variable u = {u, v, w}
    lemm1: LinearElasticModel "Linear Elastic Material 1" (default)
    axi1: AxialSymmetrySolid "Axial Symmetry 1" (default)
    free1: Free (default)
    init1: init "Initial Values 1" (default)

Multiphysics
  te1: ThermalExpansion on domains 1 | Heat_physics = ht; Solid_physics = solid

Mesh
  mesh1 "Mesh 1"
    size: MeshSizeDefault | hauto = 2
    ftri1: FreeTri "Free Triangular 1" on remaining entities | smoothmaxiter = 4; smoothmaxdepth = 4

Studies
  std1 "Study 1"
    stat: Stationary

Solver configurations
  sol1 "Solution 1" (study std1)
    v1: Variables "Dependent Variables 1"
    s1: Stationary "Stationary Solver 1" | stol = 0.01
      fc1: FullyCoupled | linsolver = d1; initstep = 0.01; minstep = 1.0E-6; maxiter = 50
      d1: Direct "Direct, temperature ht (te1) (merged)" | pivotperturb = 1.0E-13

Datasets
  dset1: Solution | solution = sol1
  rev1: Revolve2D "Revolution 2D" | data = dset1; startangle = -90; revangle = 225
  cln1: CutLine2D | data = dset1; genpoints = {{0, 0.001}, {0.05, 0.001}}

Plots
  pg1: PlotGroup3D "Temperature, 3D (ht)" | data = rev1
    surf1: Surface | expr = T
  pg2: PlotGroup2D "Isothermal Contours (ht)" | data = dset1; dataisaxisym = on
    con1: Contour | expr = T; levelrounding = off
  pg4: PlotGroup1D "1D Plot Group 4" | data = cln1
    lngr1: LineGraph | expr = T; xdataexpr = r
  pg5: PlotGroup3D "3D Plot Group 5" | data = rev1
    vol1: Volume | expr = solid.sp1; descr = First principal stress
  pg6: PlotGroup1D "1D Plot Group 6" | data = cln1
    lngr1: LineGraph | expr = solid.sp3r; descr = Principal stress direction 3, r component

Exports
  data1: Data
    data = cln1
    expr = {T, r}
    filename = C:\Users\larsk\OneDrive\Documents\AA Lars 2025\1. Graduation Project\COMSOL\conduction\Tr_qi_and_2qrad_q100_k900.txt